// COMSOL Multiphysics 5.6.0.401 model "h7-version2.mph"
// Outline of the model tree

Parameters
  b = 1
  dx = 0.01[cm]  // x axis step
  N = 10[cm]  // length
  a = 1.23  // tapering
  w = 2.5[cm]  // width

Common definitions
  mpf1: ParticipationFactors

Geometry
  geom2 "Geometry 2" (3D, length unit m)
    wp2: WorkPlane | unite = on
      pc1: ParametricCurve | parmax = 1.25; coord = {s [cm], (a-2.5-a*cos((s-1.25)*2*pi*b/5)) [cm]}
      pc2: ParametricCurve | parmin = 8.75; parmax = 10; coord = {s [cm], (a-2.5-a*cos(-(s-8.75)*2*pi*b/5))[cm]}
      pc3: ParametricCurve | parmin = 2.5; parmax = 7.5; coord = {s [cm], (a-2.5+a*cos((s-5)*2*pi*b/5)) [cm]}
      pol1: Polygon
        type = open
        source = table
        table = 
          {0.0125, (a-2.5-a*cos((1.25-1.25)*2*pi*b/5)) [cm]}
          {0.025, (a-2.5+a*cos((2.5-5)*2*pi*b/5)) [cm]}
      pol2: Polygon
        type = open
        source = table
        table = 
          {0.075, (a-2.5+a*cos((7.5-5)*2*pi*b/5)) [cm]}
          {0.0875, (a-2.5-a*cos(-(8.75-8.75)*2*pi*b/5))[cm]}
      pol3: Polygon
        type = open
        source = table
        table = 
          {0, (a-2.5-a*cos((0-1.25)*2*pi*b/5)) [cm]}
          {0, 0}
          {0.1, 0}
          {0.1, (a-2.5-a*cos(-(10-8.75)*2*pi*b/5))[cm]}
      uni1: Union | input = pc1, pc2, pc3, pol1, pol2, pol3
      csol1: ConvertToSolid | input = uni1
    ext1: Extrude | workplane = wp2; input = wp2; distance = 0.025
    uni1: Union | input = ext1
    fin: Finalize "Form Union"

Materials
  mat2: Common "Brazilian Rosewood" on all domains
    def "Basic"
      youngsmodulus = 13.9e9
      poissonsratio = 0.37
      density = 835

Physics
  solid: SolidMechanics on all domains
    dependent variable u = {u, v, w}
    lemm1: LinearElasticModel "Linear Elastic Material 1" (default)
    free1: Free (default)
    init1: init "Initial Values 1" (default)

Mesh
  mesh1 "Mesh 1"
    size: MeshSizeDefault | hauto = 2
    ftri1: FreeTri "Free Triangular 1" on boundaries 3
    swe1: Sweep "Swept 1" on remaining entities

Studies
  std1 "Study 1"
    param: Parametric "Parametric Sweep" | pname = a; plistarr = range(0.1,0.1,1.2); accumtable = new
    eig: Eigenfrequency | neigs = 15; conrad = 1; shift = 0

Solver configurations
  sol1 "Solution 1" (study std1)
    v1: Variables "Dependent Variables 1"
    e1: Eigenvalue "Eigenvalue Solver 1" | eigvfunscale = maximum; eigvfunscaleparam = 1.06E-7
      dDef: Direct
  sol3 "Parametric Solutions" (study std1)

Datasets
  dset1: Solution | solution = sol1
  dset3: Solution | solution = sol3

Evaluation groups
  std1EvgFrq: EvaluationGroup "Eigenfrequencies (Study 1)"
    data = dset3
    filename = C:\Users\Piergiorgio\Desktop\Università\Magistrale\2a MA\Assignments\Musical_Acoustics\HW7\DataFromComsol.txt
    includeparameters = on
    gev1: EvalGlobal "Global Evaluation 1"
      expr = {freq*2*pi, imag(freq)/abs(freq), abs(freq)/imag(freq)/2}
      unit = {rad/s, 1, 1}
      descr = {Angular frequency, Damping ratio, Quality factor}
  std1mpf1: EvaluationGroup "Participation Factors (Study 1)" | data = dset1
    gev1: EvalGlobal "Global Evaluation 1"
      expr = {mpf1.pfLnormX, mpf1.pfLnormY, mpf1.pfLnormZ, mpf1.pfRnormX, mpf1.pfRnormY, mpf1.pfRnormZ, mpf1.mEffLX, mpf1.mEffLY, mpf1.mEffLZ, mpf1.mEffRX, mpf1.mEffRY, mpf1.mEffRZ}
      unit = {1, 1, 1, 1, 1, 1, kg, kg, kg, kg*m^2, kg*m^2, kg*m^2}
      descr = {"Participation factor, normalized, X-translation", "Participation factor, normalized, Y-translation", "Participation factor, normalized, Z-translation", "Participation factor, normalized, X-rotation", "Participation factor, normalized, Y-rotation", "Participation factor, normalized, Z-rotation", "Effective modal mass, X-translation", "Effective modal mass, Y-translation", "Effective modal mass, Z-translation", "Effective modal mass, X-rotation", "Effective modal mass, Y-rotation", "Effective modal mass, Z-rotation"}

Plots
  pg1: PlotGroup3D "Mode Shape (solid)" | data = dset1
    surf1: Surface | expr = solid.disp
      def: Deform "Deformation" | expr = {u, v, w}; descr = Displacement field
  pg2: PlotGroup3D "Mode Shape (solid) 1" | data = dset3
    surf1: Surface | expr = solid.disp
      def: Deform "Deformation" | expr = {u, v, w}; descr = Displacement field
  pg3: PlotGroup1D "1D Plot Group 3" | data = none
    tblp1: Table "Table Graph 1" | source = evaluationgroup; evaluationgroup = std1EvgFrq

Exports
  tbl1: Table | table = none; evaluationgroup = std1EvgFrq