// COMSOL Multiphysics 5.6.0.401 model "3D Bell model.mph"
// Outline of the model tree
// Components: comp1 "Component 1", comp2 "Component 2"

Parameters
  D1 = 80 [cm]
  D2 = 140[cm]
  D3 = 110[cm]
  h1 = 200[cm]
  h2 = 70[cm]
  h3 = 30[cm]
  h4 = 20[cm]
  h5 = 9[cm]
  t1 = 8[cm]
  t2 = 20[cm]
  t3 = 7[cm]
  t4 = 8[cm]
  t5 = 4[cm]

Functions
  gp1: GaussianPulse [comp2] | location = 0.002; sigma = 0.0001; normalization = peak

Common definitions
  mpf1: ParticipationFactors [comp1]
  mpf2: ParticipationFactors [comp2]

Geometry
  geom1 "Geometry 1" [comp1] (2D, length unit m)
    qb1: QuadraticBezier "Quadratic Bézier 1" | p = {{h1-h3, h1, h1}, {D1, D1, 0}}; w = {1, 3, 5}
    pol1: Polygon | source = table; table = {{2, 0}, {1.92, 0}}
    qb2: QuadraticBezier "Quadratic Bézier 2" | p = {{h1-t1, h1-t1, h1-h3}, {0, D1-t4, D1-t4}}; w = {1, 1, 1}
    qb3: QuadraticBezier "Quadratic Bézier 3" | p = {{1.7, 1.1225, 0.2}, {0.72, 0.72, 1.13}}; w = {4, 2, 2}
    pol2: Polygon | source = table; table = {{h4, D2-t2-t3}, {h4-h5, D2-t2-t3+t5}}
    qb4: QuadraticBezier "Quadratic Bézier 4" | p = {{0.11, 0, 0}, {1.17, 1.21889, 1.4}}; w = {6, 1.8, 3}
    pol3: Polygon | source = table; table = {{0, D2}, {h4, D2-t3}}
    qb5: QuadraticBezier "Quadratic Bézier 5" | p = {{0.2, 0.55, 1.7}, {1.33, 0.8, 0.8}}; w = {3, 1/2, 1}
    uni1: Union | input = pol1, pol2, pol3, qb1, qb2, qb3, qb4, qb5
    rot1: Rotate | input = uni1; rot = 90
    mir1: Mirror | input = rot1; axis = {1, 0}
    csol1: ConvertToSolid | input = mir1
    fin: Finalize "Form Union"
  geom2 "Geometry 2" [comp2] (3D, length unit m)
    wp1: WorkPlane | quickplane = yz; unite = on
      imp1: Import | type = sequence; sequence = geom1
    rev1: Revolve | workplane = wp1; input = wp1; angtype = full
    uni1: Union | input = rev1; keep = on; intbnd = off; face = all
    cyl1: Cylinder | pos = {-1, -1, 0.1}; axis = {90, 45}; axistype = spherical; r = 0.01
    int1: Intersection | input = cyl1, rev1; intbnd = off; face = all
    cyl2: Cylinder | pos = {-1, -1, 1}; axis = {90, 45}; axistype = spherical; r = 0.01
    int2: Intersection | input = cyl2, uni1; keep = on; intbnd = off; face = all
    del1: Delete "Delete Entities 1" | input = cyl2(1) domains 1
    fin: Finalize "Form Union"

Materials
  mat1: Common "Ni-Al bronze [solid]" [comp2] on all domains
    def "Basic"
      resistivity = res(T[1/K])[ohm*m]
      electricconductivity = sigma(T[1/K])[S/m]
      density = 8750
      res: Piecewise
        arg = T
        pieces = 
          {4.0, 19.7, 1.576045E-7-5.111821E-11*T^1}
          {19.7, 293.0, 1.565369E-7-1.263195E-11*T^1+8.370295E-13*T^2-1.571352E-15*T^3}
      sigma: Piecewise
        arg = T
        pieces = 
          {4.0, 19.7, 1/(-5.111821E-11*T+1.576045E-07)}
          {19.7, 293.0, 1/(-1.571352E-15*T^3+8.370295E-13*T^2-1.263195E-11*T+1.565369E-07)}
    Enu "Young's modulus and Poisson's ratio"
      youngsmodulus = 98.6e9
      poissonsratio = 0.34
      E: Piecewise | arg = T; pieces = {{4.0, 76.0, 1.2755E11}, {76.0, 298.0, 1.287142E11-5426172.0*T^1-129635.5*T^2}}

Physics
  solid: SolidMechanics [geom2] on all domains
    dependent variable u = {u, v, w}
    lemm1: LinearElasticModel "Linear Elastic Material 1" (default)
    free1: Free (default)
    init1: init "Initial Values 1" (default)
    bndl1: BoundaryLoad "Edge Harmonic" on boundaries 11
      LoadType = TotalForce
      Ftot = {1/sqrt(2), 1/sqrt(2), 0}
      FperArea = {1/sqrt(2), 1/sqrt(2), 0}
    bndl2: BoundaryLoad "Side Harmonic" on boundaries 21 | LoadType = TotalForce; Ftot = {1/sqrt(2), 1/sqrt(2), 0}
    bndl3: BoundaryLoad "Edge Gaussian" on boundaries 11
      LoadType = TotalForce
      Ftot = {comp2.gp1(t[1/s]), comp2.gp1(t[1/s]), 0}
    bndl4: BoundaryLoad "Side Gaussian" on boundaries 21
      LoadType = TotalForce
      Ftot = {comp2.gp1(t[1/s]), comp2.gp1(t[1/s]), 0}

Mesh
  mesh1 "Mesh 1" [geom1] (physics-controlled)
    size: MeshSizeDefault | hauto = 3
  mesh2 "Mesh 2" [geom2] (physics-controlled)
    size: MeshSizeDefault | hauto = 4

Studies
  std1 "Eigenfrequency"
    eig: Eigenfrequency | neigs = 21; shift = 1[Hz]; conrad = 1
  std3 "Frequency domain"
    freq: Frequency "Frequency Domain"
      plist = range(0.01, 10, 400)
      disabledphysics = {solid/bndl3, solid/bndl4, solid/bndl1}
  std4 "Time domain"
    time: Transient "Time Dependent"
      tlist = range(0,0.001,0.5)
      disabledphysics = {solid/bndl2, solid/bndl1, solid/bndl4}

Solver configurations
  sol1 "Solution 1" (study std1)
    v1: Variables "Dependent Variables 1"
    e1: Eigenvalue "Eigenvalue Solver 1" | eigvfunscale = maximum; eigvfunscaleparam = 4.44E-6
      dDef: Direct
  sol3 "Solution 3" (study std3)
    v1: Variables "Dependent Variables 1"
    s1: Stationary "Stationary Solver 1"
      p1: Parametric | pname = freq; plistarr = range(0.01, 10, 400); punit = Hz; pcontinuationmode = no
      fc1: FullyCoupled | linsolver = d1
      d1: Direct "Suggested Direct Solver (solid)" | linsolver = pardiso; pivotperturb = 1.0E-9
  sol4 "Solution 4" (study std4)
    v1: Variables "Dependent Variables 1"
      comp2_u: Field "Displacement field (comp2.u)" | scalemethod = manual; scaleval = 1e-2*4.43621460256
    t1: Time "Time-Dependent Solver 1" | tlist = range(0,0.001,0.5); timemethod = genalpha
      fc1: FullyCoupled | linsolver = d1
      d1: Direct "Suggested Direct Solver (solid)" | linsolver = pardiso; pivotperturb = 1.0E-9