// COMSOL Multiphysics 5.6.0.401 model "axysimmetric.mph"
// Outline of the model tree

Parameters
  D1 = 80 [cm]
  D2 = 140 [cm]
  D3 = 110 [cm]
  h1 = 200 [cm]
  h2 = 70 [cm]
  h3 = 30 [cm]
  h4 = 20 [cm]
  h5 = 9 [cm]
  t1 = 8 [cm]
  t2 = 20 [cm]
  t3 = 7 [cm]
  t4 = 8 [cm]
  t5 = 4 [cm]

Functions
  gp1: GaussianPulse | location = 0.002; sigma = 0.0001; normalization = peak

Common definitions
  mpf1: ParticipationFactors

Geometry
  geom1 "Geometry 1" (2D axisymmetric, length unit m)
    cc1: CompositeCurve | type = solid
      qb1: QuadraticBezier "Quadratic Bézier 1" | p = {{D1, D1, 0}, {h1-h3, h1, h1}}; w = {1, 3, 5}
      pol1: Polygon | type = open; source = table; table = {{0, 2}, {0, 1.92}}
      qb2: QuadraticBezier "Quadratic Bézier 5" | p = {{0, D1-t4, D1-t4}, {h1-t1, h1-t1, h1-h3}}; w = {1, 1, 1}
      qb3: QuadraticBezier "Quadratic Bézier 4" | p = {{0.72, 0.72, 1.13}, {1.7, 1.1225, 0.2}}; w = {4, 2, 2}
      pol2: Polygon | type = open; source = table; table = {{D2-t2-t3, h4}, {D2-t2-t3+t5, h4-h5}}
      qb4: QuadraticBezier "Quadratic Bézier 3" | p = {{1.17, 1.21888888889, 1.4}, {0.11, 0, 0}}; w = {6, 1.8, 3}
      pol3: Polygon | type = open; source = table; table = {{D2, 0}, {D2-t3, h4}}
      qb5: QuadraticBezier "Quadratic Bézier 2" | p = {{1.33, 0.8, 0.8}, {0.2, 0.55, 1.7}}; w = {3, 1/2, 1}
    pol1: Polygon | source = table; table = {{0, 1}, {1.65, 1}}
    int1: Intersection | input = cc1, pol1; keep = on; intbnd = off; edge = all
    del1: Delete "Delete Entities 1" | input = pol1(1) boundaries 1
    pol2: Polygon | type = open; source = table; table = {{1.75, 0.11}, {0, 0.11}}
    int2: Intersection | input = cc1, pol2; keep = on; intbnd = off; edge = all
    del2: Delete "Delete Entities 2" | input = pol2(1) boundaries 1
    fin: Finalize "Form Union"
    igv1: IgnoreVertices | input = fin(1) points 3, 4, 7-9

Materials
  mat1: Common "Material 1" on domains 1-3
    def "Basic"
      youngsmodulus = 98.6E9
      poissonsratio = 0.34
      density = 8750

Physics
  solid: SolidMechanics on all domains
    dependent variable u = {u, v, w}
    Mode2Daxi.ModeExtension = 1
    Mode2Daxi.mk = 0
    lemm1: LinearElasticModel "Linear Elastic Material 1" (default)
    axi1: AxialSymmetrySolid "Axial Symmetry 1" (default)
    free1: Free (default)
    init1: init "Initial Values 1" (default)
    bndl1: BoundaryLoad "Side harmonic" on boundaries 2 | FperArea = {1/sqrt(2), 0, 1/sqrt(2)}
    bndl2: BoundaryLoad "Edge harmonic" on boundaries 4 | FperArea = {1/sqrt(2), 0, 1/sqrt(2)}
    bndl3: BoundaryLoad "Side gaussian" on boundaries 2 | FperArea = {comp1.gp1(t[1/s]), 0, comp1.gp1(t[1/s])}
    bndl4: BoundaryLoad "Edge gaussian" on boundaries 4 | FperArea = {comp1.gp1(t[1/s]), 0, comp1.gp1(t[1/s])}

Mesh
  mesh1 "Mesh 1"
    size: MeshSizeDefault | hauto = 1
    ftri1: FreeTri "Free Triangular 1" on domains 1-3
      size1: Size on domains 1-3
      dis1: Distribution on boundaries 3, 5-9 | numelem = 150

Studies
  std1 "Study 1"
    eig: Eigenfrequency | neigs = 21; shift = 1[Hz]; conrad = 1
  std2 "Study 2"
    freq: Frequency "Frequency Domain" | plist = range(0.01, 10, 400)
  std3 "Study 3"
    time: Transient "Time Dependent" | tlist = range(0,0.1,1)

Solver configurations
  sol1 "Solution 1" (study std1)
    v1: Variables "Dependent Variables 1"
    e1: Eigenvalue "Eigenvalue Solver 1" | eigvfunscale = maximum; eigvfunscaleparam = 2.44E-6
      dDef: Direct
  sol2 "Solution 2" (study std2)
    v1: Variables "Dependent Variables 1"
    s1: Stationary "Stationary Solver 1" | stol = 0.01
      dDef: Direct
      p1: Parametric | pname = freq; plistarr = range(0.01, 10, 400); punit = Hz; pcontinuationmode = no
      fc1: FullyCoupled | linsolver = dDef

Datasets
  dset1: Solution | solution = sol1
  rev1: Revolve2D "Revolution 2D 1" | data = dset1; startangle = -90; revangle = 225
  dset2: Solution | solution = sol2
  rev2: Revolve2D "Revolution 2D 2" | data = dset2; startangle = -90; revangle = 225

Evaluation groups
  std1EvgFrq: EvaluationGroup "Eigenfrequencies (Study 1)" | data = dset1
    gev1: EvalGlobal "Global Evaluation 1"
      expr = {freq*2*pi, imag(freq)/abs(freq), abs(freq)/imag(freq)/2}
      unit = {rad/s, 1, 1}
      descr = {Angular frequency, Damping ratio, Quality factor}
  std1mpf1: EvaluationGroup "Participation Factors (Study 1)" | data = dset1
    gev1: EvalGlobal "Global Evaluation 1"
      expr = {mpf1.pfLnormR, mpf1.pfLnormZ, mpf1.pfRnormZ, mpf1.mEffLR, mpf1.mEffLZ, mpf1.mEffRZ}
      unit = {1, 1, 1, kg, kg, kg*m^2}
      descr = {"Participation factor, normalized, R-translation", "Participation factor, normalized, Z-translation", "Participation factor, normalized, Z-rotation", "Effective modal mass, R-translation", "Effective modal mass, Z-translation", "Effective modal mass, Z-rotation"}

Plots
  pg1: PlotGroup2D "Mode Shape (solid)" | data = dset1
    surf1: Surface | expr = solid.disp
      def: Deform "Deformation" | expr = {u, w}; descr = Displacement field
  pg2: PlotGroup3D "Mode Shape, 3D (solid)" | data = rev1
    surf1: Surface | expr = solid.disp
      def: Deform "Deformation" | revcoordsys = cylindrical; expr = {u, 0, w}; descr = Displacement field
  pg3: PlotGroup2D "Stress (solid)" | data = dset2
    surf1: Surface | expr = solid.mises
      def: Deform "Deformation" | expr = {u, w}; descr = Displacement field
  pg4: PlotGroup3D "Stress, 3D (solid)" | data = rev2
    surf1: Surface | expr = solid.mises
      def: Deform "Deformation" | revcoordsys = cylindrical; expr = {u, v, w}; descr = Displacement field
  pg5: PlotGroup2D "Boundary Loads (solid)" | data = dset2
    arwl1: ArrowLine "Boundary Load 1" | expr = {solid.bndl1.F_Ar, solid.bndl1.F_Az}
      col: Color "Color Expression" | expr = solid.bndl1.F_A_Mag
      def: Deform "Deformation" | expr = {u, w}; descr = Displacement field
    surf1: Surface "Gray Surfaces" | expr = 1
      def: Deform "Deformation" | expr = {u, w}; descr = Displacement field
      sel1: Selection on domains 1-3